// COMSOL Multiphysics 5.4.0.346 model "Sim1D_terme_source_non_constant_.mph"
// Outline of the model tree

Geometry
  geom1 "Geometry 1" (1D, length unit m)
    i1: Interval | coord = {0, 0.5}
    fin: Finalize "Form Union"

Physics
  cdeq: ConvectionDiffusionEquation on all domains
    dependent variable C
    ShapeProperty.order = 2
    Units.DependentVariableQuantity = concentration
    Units.CustomSourceTermUnit = mol/m^3/s
    cdeq1: ConvectionDiffusionEquation (default) | f = -4*10^-9*C[s^-1]*10^10; c = 1; be = -1/x; da = 10^10
    zflx1: ZeroFluxBoundary "Zero Flux 1" (default)
    init1: init "Initial Values 1" (default) | C = 0
    dir1: DirichletBoundary "Dirichlet Boundary Condition 1" on boundaries 2 | r = 12; useDirichletCondition = 1

Mesh
  mesh1 "Mesh 1"
    size: MeshSizeDefault | hmax = 0.5/80; custom = on
    edg1: Edge on remaining entities

Studies
  std2 "Study 2"
    stat: Stationary
  std3 "Study 3"
    time: Transient "Time Dependent" | tunit = Ms; tlist = range(0,10,1000); usertol = on; rtol = 0.000001

Solver configurations
  sol1 "Solution 1" (study std2)
    v1: Variables "Dependent Variables 1"
    s1: Stationary "Stationary Solver 1"
      dDef: Direct
      fc1: FullyCoupled | linsolver = dDef
  sol2 "Solution 2" (study std3)
    v1: Variables "Dependent Variables 1"
    t1: Time "Time-Dependent Solver 1" | tlist = range(0,10,1000)
      dDef: Direct
      fc1: FullyCoupled | linsolver = dDef

Datasets
  dset1: Solution | solution = sol1
  dset2: Solution | solution = sol2

Plots
  pg1: PlotGroup1D "1D Plot Group 1" | data = dset1
    lngr1: LineGraph on all domains | expr = C; xdata = expr; xdataexpr = x
  pg2: PlotGroup1D "1D Plot Group 2"
    data = dset2
    title = Convergence de la concentration
    xlabel = Rayon (m)
    ylabel = Concentration (mol/m<sup>3</sup>)
    lngr1: LineGraph on all domains | expr = C; xdata = expr; xdataexpr = x

Exports
  plot1: Plot | filename = Y:\Documents\MEC8211\Projet\Devoir2\data_comsol.txt; sort = on
  plot3: Plot | filename = Y:\Documents\MEC8211\Projet\Devoir2\data_comsol_rp.txt